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/batch
! ANSYS input file written by Workbench version 2026 R1
! File used for geometry attach: C:\Users\srp07\OneDrive\Desktop\suspension-bracket-fea-optimization\cad\bracket_channel_v2.step
/title,bracket_3mm--Transient (B5)
/com,--- Data in consistent NMM units. See Solving Units in the help system for more information.
/units,MPA
/prep7
! Turn off shape checking because checks already performed inside WB mesher.
! See help system for more information.
SHPP,OFF,,NOWARN
etcon,set             ! allow ANSYS to choose best KEYOP's for 180x elements, resets any applicable keyopt to MAPDL defaults
/com,*********** Send User Defined Coordinate System(s) ***********
csys,0
/com,*********** Nodes for the whole assembly ***********
nblock,3,,110583
(1i9,3e20.9e3)
        1     0.000000000E+00    -1.300000000E+01     5.000000075E+00
        2     0.000000000E+00    -1.500000000E+01     7.000000075E+00
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-1
/com,*********** Elements for Body 1 '2026-08-30-22-58-16-228|Body1' ***********
et,1,187
MAT,1 $ TYPE,1 $ REAL,1 $ SECNUM,1 $ ESYS,0    ! ELEMNODES = 10
eblock,21,COMPACT,,58274
(21i9)
        1     2270    15617    13374    15402    30318    96576    30316    30317   100479    96574
        2     2270    15617     4533    13374    30318    42759    30313    30316    96576    42758
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-1
secnum,1    ! reset the section ID to default
toffst,273.15,      ! Temperature offset from absolute zero
/com,*********** Set Reference Temperature ***********
tref,22.
/com,*********** Send Materials ***********
Temperature = 'TEMP' ! Temperature
MP,DENS,1,7.85e-09,	! tonne mm^-3
MP,ALPX,1,1.2e-05,	! C^-1
MP,C,1,434000000,	! mm^2 s^-2 C^-1
MP,KXX,1,60.5,	! tonne mm s^-3 C^-1
MP,RSVX,1,0.00017,	! ohm mm
MP,EX,1,200000,	! tonne s^-2 mm^-1
MP,NUXY,1,0.3,
MP,MURX,1,10000,

!************************* Model Summary ********************
! 2026-08-30-22-58-16-228|Body1,	Structural Steel,	matid,	1
!************************* End Model Summary ********************
/com,*********** Fixed Supports ***********
CMBLOCK,_FIXEDSU,NODE,      278
(8i10)
       508      -571      1301     -1391     19334    -19336     19340    -19343
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cmsel,s,_FIXEDSU
d,all,all
nsel,all
/com,*********** Define Force Using Surface Effect Elements ***********
local,12,0,0.,0.,0.,0.,0.,0.
csys,0
et,2,154
MAT,2 $ TYPE,2 $ REAL,2 $ SECNUM,2 $ ESYS,12    ! ELEMNODES = 8
eblock,21,COMPACT,,316
(21i9)
    80315      476      573      477      477    19136    19140      477    19134
    80316      573      574     1179     1179    19777    19786     1179    19778
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-1
secnum,1    ! reset the section ID to default
esel,s,type,,2
keyop,2,2,1         ! Apply load in local coordinate system
keyop,2,7,1         ! Use original area so load is constant in large deformation
esel,all

*DIM,_loadvari41x,TABLE,101,1,1,TIME, , , 0
! Time values
*TAXIS,_loadvari41x(1),1,0.,2.001e-002,4.002e-002,6.1031e-002,8.1041e-002,0.101051,0.121061,0.141071,0.162081,0.182091
*TAXIS,_loadvari41x(11),1,0.202101,0.222111,0.242121,0.262131,0.283142,0.303152,0.323162,0.343172,0.356178,0.363182
*TAXIS,_loadvari41x(21),1,0.384192,0.404202,0.424212,0.444222,0.464232,0.485243,0.505253,0.525263,0.545273,0.565283
*TAXIS,_loadvari41x(31),1,0.586293,0.606303,0.626313,0.646323,0.666333,0.687344,0.707354,0.727364,0.747374,0.767384
*TAXIS,_loadvari41x(41),1,0.787394,0.808404,0.828414,0.848424,0.868434,0.888444,0.909455,0.929465,0.949475,0.969485
*TAXIS,_loadvari41x(51),1,0.989495,1.010505,1.030515,1.050525,1.070535,1.090545,1.111556,1.131566,1.151576,1.171586
*TAXIS,_loadvari41x(61),1,1.191596,1.212606,1.232616,1.252626,1.272636,1.292646,1.312656,1.333667,1.353677,1.373687
*TAXIS,_loadvari41x(71),1,1.393697,1.413707,1.434717,1.454727,1.474737,1.494747,1.514757,1.535768,1.555778,1.575788
*TAXIS,_loadvari41x(81),1,1.595798,1.615808,1.636818,1.656828,1.676838,1.696848,1.716858,1.737869,1.757879,1.777889
*TAXIS,_loadvari41x(91),1,1.797899,1.817909,1.837919,1.858929,1.878939,1.898949,1.918959,1.938969,1.95998,1.97999
*TAXIS,_loadvari41x(101),1,2.
! Load values
_loadvari41x(1,1,1) = 0.
_loadvari41x(2,1,1) = 1.05707931651655e-007
_loadvari41x(3,1,1) = 1.90544194771737e-007
_loadvari41x(4,1,1) = 1.3796716864178e-007
_loadvari41x(5,1,1) = 4.81232039220726e-008
_loadvari41x(6,1,1) = -2.54342744781241e-008
_loadvari41x(7,1,1) = -9.32403718327696e-008
_loadvari41x(8,1,1) = -1.60581735411347e-007
_loadvari41x(9,1,1) = -2.14281362555953e-007
_loadvari41x(10,1,1) = -2.34765044756227e-007
_loadvari41x(11,1,1) = -2.22234420277361e-007
_loadvari41x(12,1,1) = -1.79438424484638e-007
_loadvari41x(13,1,1) = -1.11306917964174e-007
_loadvari41x(14,1,1) = -2.62377247022793e-008
_loadvari41x(15,1,1) = 6.89854058374978e-008
_loadvari41x(16,1,1) = 1.52331128175959e-007
_loadvari41x(17,1,1) = 2.16898318667288e-007
_loadvari41x(18,1,1) = 2.53851521608142e-007
_loadvari41x(19,1,1) = 2.6044954225535e-007
_loadvari41x(20,1,1) = 2.58142698522988e-007
_loadvari41x(21,1,1) = 2.26973090791197e-007
_loadvari41x(22,1,1) = 1.67266062348162e-007
_loadvari41x(23,1,1) = 8.66690052766797e-008
_loadvari41x(24,1,1) = -3.73980087323362e-009
_loadvari41x(25,1,1) = -9.15994521737481e-008
_loadvari41x(26,1,1) = -1.68021724935892e-007
_loadvari41x(27,1,1) = -2.15463312731968e-007
_loadvari41x(28,1,1) = -2.31786683939313e-007
_loadvari41x(29,1,1) = -2.15140914174069e-007
_loadvari41x(30,1,1) = -1.68016803876558e-007
_loadvari41x(31,1,1) = -9.34992182361896e-008
_loadvari41x(32,1,1) = -9.35713410709815e-009
_loadvari41x(33,1,1) = 7.53702201068106e-008
_loadvari41x(34,1,1) = 1.4859229570396e-007
_loadvari41x(35,1,1) = 1.9989636829292e-007
_loadvari41x(36,1,1) = 2.22291378080577e-007
_loadvari41x(37,1,1) = 2.10502305200026e-007
_loadvari41x(38,1,1) = 1.67984629239627e-007
_loadvari41x(39,1,1) = 1.007830053004e-007
_loadvari41x(40,1,1) = 1.83801566127952e-008
_loadvari41x(41,1,1) = -6.7447525387371e-008
_loadvari41x(42,1,1) = -1.47930238647794e-007
_loadvari41x(43,1,1) = -2.04076165890281e-007
_loadvari41x(44,1,1) = -2.31972920013442e-007
_loadvari41x(45,1,1) = -2.27577182116333e-007
_loadvari41x(46,1,1) = -1.91455473508851e-007
_loadvari41x(47,1,1) = -1.24675104106595e-007
_loadvari41x(48,1,1) = -4.27894343802779e-008
_loadvari41x(49,1,1) = 4.52415448855665e-008
_loadvari41x(50,1,1) = 1.2715813757375e-007
_loadvari41x(51,1,1) = 1.90791881503789e-007
_loadvari41x(52,1,1) = 1.9420451427835e-007
_loadvari41x(53,1,1) = 6.49980961018267e-008
_loadvari41x(54,1,1) = 2.82101472083562e-008
_loadvari41x(55,1,1) = 5.57256938088584e-008
_loadvari41x(56,1,1) = 6.13169856136096e-008
_loadvari41x(57,1,1) = 4.10982764368097e-008
_loadvari41x(58,1,1) = 2.52800285835482e-008
_loadvari41x(59,1,1) = 1.74120584154985e-008
_loadvari41x(60,1,1) = 9.82571513704982e-009
_loadvari41x(61,1,1) = 4.47282790557981e-010
_loadvari41x(62,1,1) = -8.65209848186108e-009
_loadvari41x(63,1,1) = -1.53719137006474e-008
_loadvari41x(64,1,1) = -2.0658857419488e-008
_loadvari41x(65,1,1) = -2.4841211069087e-008
_loadvari41x(66,1,1) = -2.77869558689156e-008
_loadvari41x(67,1,1) = -2.93982503554802e-008
_loadvari41x(68,1,1) = -2.97695037674911e-008
_loadvari41x(69,1,1) = -2.90325833669168e-008
_loadvari41x(70,1,1) = -2.73750823071671e-008
_loadvari41x(71,1,1) = -2.49405150160776e-008
_loadvari41x(72,1,1) = -2.18971527367143e-008
_loadvari41x(73,1,1) = -1.82383615912333e-008
_loadvari41x(74,1,1) = -1.44896342984579e-008
_loadvari41x(75,1,1) = -1.06399561178171e-008
_loadvari41x(76,1,1) = -6.83589819940995e-009
_loadvari41x(77,1,1) = -3.20696279810841e-009
_loadvari41x(78,1,1) = 3.01317714700888e-010
_loadvari41x(79,1,1) = 3.26367026631159e-009
_loadvari41x(80,1,1) = 5.78914210592993e-009
_loadvari41x(81,1,1) = 7.84221201276692e-009
_loadvari41x(82,1,1) = 9.39957247956154e-009
_loadvari41x(83,1,1) = 1.050046681348e-008
_loadvari41x(84,1,1) = 1.1059326554428e-008
_loadvari41x(85,1,1) = 1.11724121026594e-008
_loadvari41x(86,1,1) = 1.08837955959854e-008
_loadvari41x(87,1,1) = 1.02473517643045e-008
_loadvari41x(88,1,1) = 9.27049184155351e-009
_loadvari41x(89,1,1) = 8.11126944961105e-009
_loadvari41x(90,1,1) = 6.79544274375989e-009
_loadvari41x(91,1,1) = 5.38549007302874e-009
_loadvari41x(92,1,1) = 3.93978560978612e-009
_loadvari41x(93,1,1) = 2.51351504886685e-009
_loadvari41x(94,1,1) = 1.08906271067343e-009
_loadvari41x(95,1,1) = -1.57737409230592e-010
_loadvari41x(96,1,1) = -1.26371749657058e-009
_loadvari41x(97,1,1) = -2.20580061580801e-009
_loadvari41x(98,1,1) = -2.96957274040609e-009
_loadvari41x(99,1,1) = -3.57094331921597e-009
_loadvari41x(100,1,1) = -3.95281620598801e-009
_loadvari41x(101,1,1) = -4.15638468588421e-009


*DIM,_loadvari41y,TABLE,101,1,1,TIME, , , 0
! Time values
*TAXIS,_loadvari41y(1),1,0.,2.001e-002,4.002e-002,6.1031e-002,8.1041e-002,0.101051,0.121061,0.141071,0.162081,0.182091
*TAXIS,_loadvari41y(11),1,0.202101,0.222111,0.242121,0.262131,0.283142,0.303152,0.323162,0.343172,0.356178,0.363182
*TAXIS,_loadvari41y(21),1,0.384192,0.404202,0.424212,0.444222,0.464232,0.485243,0.505253,0.525263,0.545273,0.565283
*TAXIS,_loadvari41y(31),1,0.586293,0.606303,0.626313,0.646323,0.666333,0.687344,0.707354,0.727364,0.747374,0.767384
*TAXIS,_loadvari41y(41),1,0.787394,0.808404,0.828414,0.848424,0.868434,0.888444,0.909455,0.929465,0.949475,0.969485
*TAXIS,_loadvari41y(51),1,0.989495,1.010505,1.030515,1.050525,1.070535,1.090545,1.111556,1.131566,1.151576,1.171586
*TAXIS,_loadvari41y(61),1,1.191596,1.212606,1.232616,1.252626,1.272636,1.292646,1.312656,1.333667,1.353677,1.373687
*TAXIS,_loadvari41y(71),1,1.393697,1.413707,1.434717,1.454727,1.474737,1.494747,1.514757,1.535768,1.555778,1.575788
*TAXIS,_loadvari41y(81),1,1.595798,1.615808,1.636818,1.656828,1.676838,1.696848,1.716858,1.737869,1.757879,1.777889
*TAXIS,_loadvari41y(91),1,1.797899,1.817909,1.837919,1.858929,1.878939,1.898949,1.918959,1.938969,1.95998,1.97999
*TAXIS,_loadvari41y(101),1,2.
! Load values
_loadvari41y(1,1,1) = 0.
_loadvari41y(2,1,1) = 1.29454879617598e-023
_loadvari41y(3,1,1) = 2.33349337278619e-023
_loadvari41y(4,1,1) = 1.68961050780553e-023
_loadvari41y(5,1,1) = 5.89339274092917e-024
_loadvari41y(6,1,1) = -3.11480027021694e-024
_loadvari41y(7,1,1) = -1.14186522454034e-023
_loadvari41y(8,1,1) = -1.96655907476886e-023
_loadvari41y(9,1,1) = -2.62418983708697e-023
_loadvari41y(10,1,1) = -2.87504259448458e-023
_loadvari41y(11,1,1) = -2.72158670351223e-023
_loadvari41y(12,1,1) = -2.19748691299519e-023
_loadvari41y(13,1,1) = -1.36311660255935e-023
_loadvari41y(14,1,1) = -3.21319454434719e-024
_loadvari41y(15,1,1) = 8.44827561047504e-024
_loadvari41y(16,1,1) = 1.86551827775952e-023
_loadvari41y(17,1,1) = 2.65623830620978e-023
_loadvari41y(18,1,1) = 3.10878452137527e-023
_loadvari41y(19,1,1) = 3.18958696971127e-023
_loadvari41y(20,1,1) = 3.16133628189593e-023
_loadvari41y(21,1,1) = 2.77961868004713e-023
_loadvari41y(22,1,1) = 2.04841847031371e-023
_loadvari41y(23,1,1) = 1.06138919467675e-023
_loadvari41y(24,1,1) = -4.57993515031249e-025
_loadvari41y(25,1,1) = -1.12176975454091e-023
_loadvari41y(26,1,1) = -2.05767266796923e-023
_loadvari41y(27,1,1) = -2.63866455202646e-023
_loadvari41y(28,1,1) = -2.83856819422085e-023
_loadvari41y(29,1,1) = -2.63471630842263e-023
_loadvari41y(30,1,1) = -2.05761240237386e-023
_loadvari41y(31,1,1) = -1.1450351787217e-023
_loadvari41y(32,1,1) = -1.14591842870586e-024
_loadvari41y(33,1,1) = 9.23018984311594e-024
_loadvari41y(34,1,1) = 1.81973078575107e-023
_loadvari41y(35,1,1) = 2.4480244660004e-023
_loadvari41y(36,1,1) = 2.72228423542336e-023
_loadvari41y(37,1,1) = 2.57790973232703e-023
_loadvari41y(38,1,1) = 2.05721837671414e-023
_loadvari41y(39,1,1) = 1.23423584349913e-023
_loadvari41y(40,1,1) = 2.25091998725598e-024
_loadvari41y(41,1,1) = -8.2599395741656e-024
_loadvari41y(42,1,1) = -1.81162292523702e-023
_loadvari41y(43,1,1) = -2.49921222328009e-023
_loadvari41y(44,1,1) = -2.84084892833229e-023
_loadvari41y(45,1,1) = -2.78701666509437e-023
_loadvari41y(46,1,1) = -2.34465331862639e-023
_loadvari41y(47,1,1) = -1.52682966559379e-023
_loadvari41y(48,1,1) = -5.24019436389875e-024
_loadvari41y(49,1,1) = 5.54049129082875e-024
_loadvari41y(50,1,1) = 1.55723805534795e-023
_loadvari41y(51,1,1) = 2.3365266604099e-023
_loadvari41y(52,1,1) = 2.37831935828102e-023
_loadvari41y(53,1,1) = 7.95997100195204e-024
_loadvari41y(54,1,1) = 3.45474663423261e-024
_loadvari41y(55,1,1) = 6.82442922770017e-024
_loadvari41y(56,1,1) = 7.50916498610681e-024
_loadvari41y(57,1,1) = 5.03308724850511e-024
_loadvari41y(58,1,1) = 3.09591059618602e-024
_loadvari41y(59,1,1) = 2.13236215187798e-024
_loadvari41y(60,1,1) = 1.20330305432069e-024
_loadvari41y(61,1,1) = 5.47763435552947e-026
_loadvari41y(62,1,1) = -1.05957646688226e-024
_loadvari41y(63,1,1) = -1.88251648340548e-024
_loadvari41y(64,1,1) = -2.52998035103931e-024
_loadvari41y(65,1,1) = -3.04217094995411e-024
_loadvari41y(66,1,1) = -3.40292064251515e-024
_loadvari41y(67,1,1) = -3.60024730526179e-024
_loadvari41y(68,1,1) = -3.6457127353469e-024
_loadvari41y(69,1,1) = -3.55546601473328e-024
_loadvari41y(70,1,1) = -3.35248067881448e-024
_loadvari41y(71,1,1) = -3.05433217598734e-024
_loadvari41y(72,1,1) = -2.6816277900894e-024
_loadvari41y(73,1,1) = -2.23355510539719e-024
_loadvari41y(74,1,1) = -1.77446841925841e-024
_loadvari41y(75,1,1) = -1.30301881500012e-024
_loadvari41y(76,1,1) = -8.37156081531289e-025
_loadvari41y(77,1,1) = -3.92739670978832e-025
_loadvari41y(78,1,1) = 3.69007773340937e-026
_loadvari41y(79,1,1) = 3.99684332892994e-025
_loadvari41y(80,1,1) = 7.08965432113429e-025
_loadvari41y(81,1,1) = 9.60393980078906e-025
_loadvari41y(82,1,1) = 1.15111563038465e-024
_loadvari41y(83,1,1) = 1.2859363020621e-024
_loadvari41y(84,1,1) = 1.35437688107746e-024
_loadvari41y(85,1,1) = 1.36822586648853e-024
_loadvari41y(86,1,1) = 1.33288053852368e-024
_loadvari41y(87,1,1) = 1.25493864870872e-024
_loadvari41y(88,1,1) = 1.1353078114318e-024
_loadvari41y(89,1,1) = 9.93344012827306e-025
_loadvari41y(90,1,1) = 8.32201717124357e-025
_loadvari41y(91,1,1) = 6.59532315307379e-025
_loadvari41y(92,1,1) = 4.82484581681833e-025
_loadvari41y(93,1,1) = 3.07816814674175e-025
_loadvari41y(94,1,1) = 1.3337171572975e-025
_loadvari41y(95,1,1) = -1.93172612537996e-026
_loadvari41y(96,1,1) = -1.54760758093629e-025
_loadvari41y(97,1,1) = -2.70132665277041e-025
_loadvari41y(98,1,1) = -3.63667773665072e-025
_loadvari41y(99,1,1) = -4.3731442881101e-025
_loadvari41y(100,1,1) = -4.84080369468336e-025
_loadvari41y(101,1,1) = -5.09010318098626e-025


*DIM,_loadvari41z,TABLE,101,1,1,TIME, , , 0
! Time values
*TAXIS,_loadvari41z(1),1,0.,2.001e-002,4.002e-002,6.1031e-002,8.1041e-002,0.101051,0.121061,0.141071,0.162081,0.182091
*TAXIS,_loadvari41z(11),1,0.202101,0.222111,0.242121,0.262131,0.283142,0.303152,0.323162,0.343172,0.356178,0.363182
*TAXIS,_loadvari41z(21),1,0.384192,0.404202,0.424212,0.444222,0.464232,0.485243,0.505253,0.525263,0.545273,0.565283
*TAXIS,_loadvari41z(31),1,0.586293,0.606303,0.626313,0.646323,0.666333,0.687344,0.707354,0.727364,0.747374,0.767384
*TAXIS,_loadvari41z(41),1,0.787394,0.808404,0.828414,0.848424,0.868434,0.888444,0.909455,0.929465,0.949475,0.969485
*TAXIS,_loadvari41z(51),1,0.989495,1.010505,1.030515,1.050525,1.070535,1.090545,1.111556,1.131566,1.151576,1.171586
*TAXIS,_loadvari41z(61),1,1.191596,1.212606,1.232616,1.252626,1.272636,1.292646,1.312656,1.333667,1.353677,1.373687
*TAXIS,_loadvari41z(71),1,1.393697,1.413707,1.434717,1.454727,1.474737,1.494747,1.514757,1.535768,1.555778,1.575788
*TAXIS,_loadvari41z(81),1,1.595798,1.615808,1.636818,1.656828,1.676838,1.696848,1.716858,1.737869,1.757879,1.777889
*TAXIS,_loadvari41z(91),1,1.797899,1.817909,1.837919,1.858929,1.878939,1.898949,1.918959,1.938969,1.95998,1.97999
*TAXIS,_loadvari41z(101),1,2.
! Load values
_loadvari41z(1,1,1) = 0.
_loadvari41z(2,1,1) = 8.51272664480025
_loadvari41z(3,1,1) = 15.3446446118215
_loadvari41z(4,1,1) = 11.1105834184217
_loadvari41z(5,1,1) = 3.87539207190767
_loadvari41z(6,1,1) = -2.04823822260171
_loadvari41z(7,1,1) = -7.50870616111871
_loadvari41z(8,1,1) = -12.9317487944911
_loadvari41z(9,1,1) = -17.2562137581622
_loadvari41z(10,1,1) = -18.9057776511017
_loadvari41z(11,1,1) = -17.8966785304346
_loadvari41z(12,1,1) = -14.4502899010931
_loadvari41z(13,1,1) = -8.96361655648175
_loadvari41z(14,1,1) = -2.11294057770479
_loadvari41z(15,1,1) = 5.55543839709619
_loadvari41z(16,1,1) = 12.2673221715209
_loadvari41z(17,1,1) = 17.4669588902365
_loadvari41z(18,1,1) = 20.4428237129628
_loadvari41z(19,1,1) = 20.9741664919657
_loadvari41z(20,1,1) = 20.7883949060587
_loadvari41z(21,1,1) = 18.2782866663027
_loadvari41z(22,1,1) = 13.4700418736243
_loadvari41z(23,1,1) = 6.97950985294461
_loadvari41z(24,1,1) = -0.301168531465865
_loadvari41z(25,1,1) = -7.3765618623412
_loadvari41z(26,1,1) = -13.5308958601185
_loadvari41z(27,1,1) = -17.3513969539639
_loadvari41z(28,1,1) = -18.6659283693324
_loadvari41z(29,1,1) = -17.3254339940309
_loadvari41z(30,1,1) = -13.5304995640954
_loadvari41z(31,1,1) = -7.52955122582554
_loadvari41z(32,1,1) = -0.75353593233622
_loadvari41z(33,1,1) = 6.06961153153599
_loadvari41z(34,1,1) = 11.9662316260194
_loadvari41z(35,1,1) = 16.0977810650342
_loadvari41z(36,1,1) = 17.9012653783796
_loadvari41z(37,1,1) = 16.9518838772972
_loadvari41z(38,1,1) = 13.5279085202181
_loadvari41z(39,1,1) = 8.11611920845223
_loadvari41z(40,1,1) = 1.48016564593233
_loadvari41z(41,1,1) = -5.43159191103067
_loadvari41z(42,1,1) = -11.9129157522307
_loadvari41z(43,1,1) = -16.4343828111943
_loadvari41z(44,1,1) = -18.680926078262
_loadvari41z(45,1,1) = -18.3269345230815
_loadvari41z(46,1,1) = -15.4180304653243
_loadvari41z(47,1,1) = -10.040165048058
_loadvari41z(48,1,1) = -3.44586023464417
_loadvari41z(49,1,1) = 3.64333024572293
_loadvari41z(50,1,1) = 10.2401253048289
_loadvari41z(51,1,1) = 15.3645909811295
_loadvari41z(52,1,1) = 15.6394124585249
_loadvari41z(53,1,1) = 5.23433782027503
_loadvari41z(54,1,1) = 2.2717810105837
_loadvari41z(55,1,1) = 4.48762539456253
_loadvari41z(56,1,1) = 4.93789566266321
_loadvari41z(57,1,1) = 3.30967021502134
_loadvari41z(58,1,1) = 2.03581670308003
_loadvari41z(59,1,1) = 1.40220408533659
_loadvari41z(60,1,1) = 0.791271059271277
_loadvari41z(61,1,1) = 3.60199662357494e-002
_loadvari41z(62,1,1) = -0.696758967176529
_loadvari41z(63,1,1) = -1.23790994011963
_loadvari41z(64,1,1) = -1.66367086422177
_loadvari41z(65,1,1) = -2.00047845088654
_loadvari41z(66,1,1) = -2.23770114415537
_loadvari41z(67,1,1) = -2.36745970904337
_loadvari41z(68,1,1) = -2.39735698130117
_loadvari41z(69,1,1) = -2.33801231500178
_loadvari41z(70,1,1) = -2.20453270552827
_loadvari41z(71,1,1) = -2.00847546059312
_loadvari41z(72,1,1) = -1.7633915699094
_loadvari41z(73,1,1) = -1.46874680309537
_loadvari41z(74,1,1) = -1.16685942141374
_loadvari41z(75,1,1) = -0.856842400834438
_loadvari41z(76,1,1) = -0.550499208848609
_loadvari41z(77,1,1) = -0.258258744010844
_loadvari41z(78,1,1) = 2.42653062869233e-002
_loadvari41z(79,1,1) = 0.262825432318805
_loadvari41z(80,1,1) = 0.466203278085925
_loadvari41z(81,1,1) = 0.631538297194637
_loadvari41z(82,1,1) = 0.756953521332489
_loadvari41z(83,1,1) = 0.845609238865018
_loadvari41z(84,1,1) = 0.890614567539422
_loadvari41z(85,1,1) = 0.899721418317124
_loadvari41z(86,1,1) = 0.876478948351965
_loadvari41z(87,1,1) = 0.825225723743215
_loadvari41z(88,1,1) = 0.746558575850822
_loadvari41z(89,1,1) = 0.65320566288629
_loadvari41z(90,1,1) = 0.547241305398425
_loadvari41z(91,1,1) = 0.433696924380802
_loadvari41z(92,1,1) = 0.317273428882777
_loadvari41z(93,1,1) = 0.202414957839733
_loadvari41z(94,1,1) = 8.77029094236649e-002
_loadvari41z(95,1,1) = -1.27026934068102e-002
_loadvari41z(96,1,1) = -0.101767969881456
_loadvari41z(97,1,1) = -0.177634519774577
_loadvari41z(98,1,1) = -0.239141572405665
_loadvari41z(99,1,1) = -0.287570325760746
_loadvari41z(100,1,1) = -0.318322791042761
_loadvari41z(101,1,1) = -0.334716289579507


fini
/com,****************************************************************************
/com,*************************    SOLUTION       ********************************
/com,****************************************************************************
/solu
antype,4                   ! transient analysis
kbc,1                      ! stepped BC's
_thickRatio=  1     ! Ratio of thick parts in the model
eqsl,pcg,1e-8,,,,,,1
cntr,print,1               ! print out contact info and also make no initial contact an error
cncheck,dmp		!	Enable program controlled contact splitting for distributed memory parallel run
dmpoption,emat,no             ! Don't combine emat file for DANSYS
dmpoption,esav,no             ! Don't combine esav file for DANSYS
trnopt,full,,,,,hht        ! HHT time integration method
tintp, mosp			! Choose transient integration settings for moderate speed application
nldiag,cont,iter           ! print out contact info each equilibrium iteration
rescontrol,define,last,last,,dele	   ! Program Controlled
/com,****************************************************
/com,******************* SOLVE FOR LS 1 OF 1 ****************
esel,s,type,,2
nsle
sfe,all,1,pres,1,%_loadvari41x%
sfe,all,2,pres,1,%_loadvari41y%
sfe,all,3,pres,1,%_loadvari41z%
nsel,all
esel,all
autots,on                   ! User turned on automatic time stepping
nsub,51,51,51,OFF
time,2.
timint,on                  ! Turn on time integration effects
outres,erase
outres,all,none
outres,nsol,all,
outres,rsol,all
outres,eangl,all
outres,etmp,all
outres,veng,all
outres,strs,all,
outres,epel,all,
outres,eppl,all,
outres,cont,all,
outres,v,all,
outres,a,all,
! *********** WB SOLVE COMMAND ***********
! check interactive state
*get,ANSINTER_,active,,int
*if,ANSINTER_,ne,0,then
/eof
*endif
solve
/com *************** Write FE CONNECTORS *********
CEWRITE,file,ce,,INTE
/com,****************************************************
/com,*************** FINISHED SOLVE FOR LS 1 *************
fini
*get,_NSOLTHREADS,active,0,ntfs
*get,_NSOLPROCESSES,active,0,npfs
*get,_PCGITER,active,,solu,cgiter
/post1
fini
